OpenVSP model (file version 5), 1 components.
Geometry view with OpenVSP parameter names; values to 6 digits, angles in degrees, lengths in the model's unit.
Overall bounding box: X_Min=0 X_Len=22.67 Y_Min=-1.28191 Y_Len=3.63508 Z_Min=-2.1211 Z_Len=4.24219

Fuselage "FuselageGeom"
  location (X Y Z) 0 0 0, rotation 0 0 0
  bounding box size 22.67 3.63508 4.24219
  Design: Length=22.67
  cross sections:
    n   XLocPercent  YLocPercent  ZLocPercent  ZRotate  shape
    0   0            0            0            0        ellipse Ellipse_Height=0.12 Ellipse_Width=0.132339
    1   0.0319687    0            0            0        ellipse Ellipse_Height=1.45 Ellipse_Width=1.18425
    2   0.0559014    0            0            0        ellipse Ellipse_Height=2.1 Ellipse_Width=1.60329
    3   0.0958999    0            0            0        ellipse Ellipse_Height=2 Ellipse_Width=1.78555
    4   0.133783     0            0            0        ellipse Ellipse_Height=3.67647 Ellipse_Width=1.93337
    5   0.224508     0.012987     0            0        ellipse Ellipse_Height=2.6 Ellipse_Width=2.23903
    6   0.272561     0.012987     0            0        ellipse Ellipse_Height=2.7 Ellipse_Width=2.19004
    7   0.507278     0            0            0        ellipse Ellipse_Height=2.7 Ellipse_Width=2.04878
    8   0.547116     0.025974     0            0        ellipse Ellipse_Height=2.7 Ellipse_Width=2.40268
    9   0.639324     0.0258054    0            0        ellipse Ellipse_Height=2.6 Ellipse_Width=2.82274
    10  0.70387      0.025974     0            0        ellipse Ellipse_Height=2.4 Ellipse_Width=2.04706
    11  0.857588     0.038961     0            1.02273  ellipse Ellipse_Height=0.82 Ellipse_Width=1.45476
    12  0.923602     0.038961     0            0        ellipse Ellipse_Height=0.51 Ellipse_Width=0.963023
    13  0.965765     0.038961     0            0        ellipse Ellipse_Height=0.45 Ellipse_Width=0.551226
    14  1            0.0512734    0            0        ellipse Ellipse_Height=0.2 Ellipse_Width=0
